b := [-5.13; -3.69; -5.98]
A := [1.53, 1.61, 1.43; 2.35, 2.31, 2.07; 3.83, 3.73, 3.45]
ORIGIN := 1
transpose(A) = [1.53, 2.35, 3.83; 1.61, 2.31, 3.73; 1.43, 2.07, 3.45]
transpose(A)*A = [22.5323, 22.1777, 20.2659; 22.1777, 21.8411, 19.9525; 20.2659, 19.9525, 18.2323]
g := augment(A, b) = [1.53, 1.61, 1.43, -5.13; 2.35, 2.31, 2.07, -3.69; 3.83, 3.73, 3.45, -5.98]
C := cholesky(transpose(A)*A) = [4.74682, 0, 0; 4.67212, 0.111443, 0; 4.26936, 0.0496464, 0.0486882]
h := rref(g) = [1, 0, 0, 24.6968; 0, 1, 0, -19.2532; 0, 0, 1, -8.33452]
transpose(C) = [4.74682, 4.67212, 4.26936; 0, 0.111443, 0.0496464; 0, 0, 0.0486882]
z := submatrix(h, 1, 3, 4, 4) = [24.6968; -19.2532; -8.33452]
y := lsolve(C, transpose(A)*b) = [-8.30531; -2.55941; -0.405793]
x := lsolve(transpose(C), y) = [24.6968; -19.2532; -8.33452]
