A := [
    5.6, 0.0268, 0.0331, 0.0393;
    0.0147, 4.7, 0.0271, 0.0334;
    0.0087, 0.015, 3.8, 0.0274;
    0.0028, 0.009, 0.0153, 2.9
]
ε := 0.0001
b := [4.0316; 4.3135; 4.2353; 3.7969]
ORIGIN := 1
Jacobi(A, b, ε) :=
    x0 ← b
    n ← rows(A)
    while 1
        for i ∈ 1 .. n
            s1 ← sum(A[i, j]*x0[j], j = 1 .. i - 1) if i > 1
            s1 ← 0 otherwise
            s2 ← sum(A[i, j]*x0[j], j = i + 1 .. n) if i < n
            s2 ← 0 otherwise
            x1[i] ← (b[i] - s1 - s2)/A[i, i]
        break if |x1 - x0| < ε
        x0 ← x1
    x1
x := Jacobi(A, b, ε) = [0.699996; 0.899996; 1.10002; 1.3]
|A*x - b| = 9.12272e-7
Zeidel(A, b, ε) :=
    x0 ← b
    n ← rows(A)
    while 1
        for i ∈ 1 .. n
            s1 ← sum(A[i, j]*x1[j], j = 1 .. i - 1) if i > 1
            s1 ← 0 otherwise
            s2 ← sum(A[i, j]*x0[j], j = i + 1 .. n) if i < n
            s2 ← 0 otherwise
            x1[i] ← (b[i] - s1 - s2)/A[i, i]
        break if |x1 - x0| < ε
        x0 ← x1
    return x1
x := Zeidel(A, b, ε) = [0.699996; 0.899996; 1.10002; 1.3]
υ
|A*x - b| = 7.79626e-10
