ORIGIN := 1
A := [1.07, 0.995; 0.991, 0.944]
b := [2.55; 2.45]
x := [0; 0]
bv := [2.545; 2.455]
a := A[1, 1]/sqrt(A[1, 1]^2 + A[2, 1]^2) = 0.733672
c := A[2, 1]/sqrt(A[1, 1]^2 + A[2, 1]^2) = 0.679504
C := [a*A[1, 1] + c*A[2, 1], a*A[1, 2] + c*A[2, 2]; a*A[2, 1] - c*A[1, 1], a*A[2, 2] - c*A[1, 2]] = [1.45842, 1.37146; 0, 0.0164802]
D := [a*b[1] + c*b[2]; a*b[2] - c*b[1]] = [3.53565; 0.064762]
z := lsolve(C, D) = [-1.27106; 3.92969]
|C*z - D| = 0
y(t) := lsolve(transpose(A)*A + t*identity(2), transpose(A)*b + t*x)
regular := y(0.0000001) = [-1.26929; 3.9278]
x := lsolve(A, b) = [-1.27106; 3.92969]
xv := lsolve(A, bv) = [-1.67443; 4.35844]
δb := 0.005/b[1] = 0.00196078
δx := |(x[2] + xv[2])/xv[1]| = 4.94981
yv(t) := lsolve(transpose(A)*A + t*identity(2), transpose(A)*bv + t*x)
regularv := yv(0.0000001) = [-1.67415; 4.35814]
