# Worksheet setting: ORIGIN = 1
Newton(f, J, x, ε, max_iter) :=
    iteration ← 0
    while 1
        for i ∈ 1 .. rows(x)
            result[iteration + 1, i] ← x[i]
        result[iteration + 1, rows(x) + 1] ← iteration
        if iteration > 0
            if max(vectorize(|x[1] - xOld[1]|)) < ε
                break
        if iteration ≥ max_iter
            result ← "Max iterations reached"
            break
        iteration ← iteration + 1
        xOld ← x
        try
            x ← x - J(x)^-1*f(x)
        on error
            result ← ["Error calculating new x", x, iteration]
            break
    return result
F(x, y) := [sin(y - 1) + x - 1.3; y - sin(x + 1) - 0.8]
J(x, y) := [1, cos(y - 1); -cos(x + 1.0), 1]
F(x) := F(x[1], x[2])
J(x) := J(x[1], x[2])
Newton(F, J, [1; 0], 10^-5, 1657) = [
    1, 0, 0;
    1.28115, 1.5923, 1;
    0.16765, 2.28425, 2;
    0.4671, 1.83731, 3;
    0.578041, 1.80611, 4;
    0.582672, 1.79994, 5;
    0.582693, 1.79993, 6;
    0.582693, 1.79993, 7
]
ORIGIN := 0
g1(x, y) := 1.3 - sin(y - 1)
g2(x, y) := 0.8 + sin(x + 1)
Simple_iter(x, y, maxerr, maxiter) :=
    it ← 0
    Res ← ["step", "x", "y"; it, x, y]
    while 1
        it ← it + 1
        [(x_old ← x), (y_old ← y)]
        [x, y] ← [g1(x_old, y_old), g2(x_old, y_old)]
        [xerr, yerr] ← [|x - x_old|, |y - y_old|]
        Res ← stack(Res, [it, x, y])
        if (it ≥ maxiter) or ((xerr ≤ maxerr) and (yerr ≤ maxerr))
            break
    Res
Simple_iter(0, 1, 10^-3, 1000) = [
    "step", "x", "y";
    0, 0, 1;
    1, 1.3, 1.64147;
    2, 0.701625, 1.54571;
    3, 0.780979, 1.79145;
    4, 0.588624, 1.77799;
    5, 0.598149, 1.79984;
    6, 0.582755, 1.79963;
    7, 0.582905, 1.79993
]
