Lagr(x, y, q) :=
    result ← 0.0
    n ← rows(x) - 1
    for i ∈ 0 .. n
        s ← 1.0
        for j ∈ 0 .. n
            if i ≠ j
                s ← s*((q - x[j])/(x[i] - x[j]))
        result ← result + (y[i]*s)
    result
x := [1; 2; 3; 4; 5; 6; 7; 8; 9; 10; 11; 12; 13; 14; 15; 16; 17; 18; 19; 20]
y := [2.23; 2.29; 2.27; 2.62; 2.72; 2.82; 3.13; 3.49; 3.82; 3.95; 4.22; 4.48; 5.06; 5.5; 5.68; 6.19; 6.42; 7.04; 7.57; 8.1]
s := cspline(x, y)
Lagr(x, y, 2) = 2.29
A(t) := interp(s, x, y, t)
# [plot: A(x) vs x]
