# Worksheet setting: ORIGIN = 1
f(x, y1, y2) := [x/sqrt(1 + x^2 + y2^2); y2/sqrt(1 + x^2 + y1^2)]
Euler(a, b, N, us) :=
    h ← (b - a)/N
    u[1, 1] ← us[1]
    u[1, 2] ← us[2]
    x[1] ← a
    for i ∈ 2 .. N + 1
        u[i, 1] ← u[i - 1, 1] + h*f(x[i - 1], u[i - 1, 1], u[i - 1, 2])[1]
        u[i, 2] ← u[i - 1, 2] + h*f(x[i - 1], u[i - 1, 1], u[i - 1, 2])[2]
        x[i] ← x[i - 1] + h
    augment(x, u)
u0 := [0.2; 0.0]
N := 10
a := -1.0
b := 1.0
Euler(a, b, N, u0) = [
    -1, 0.2, 0;
    -0.8, 0.0585786, 0;
    -0.6, -0.0663604, 0;
    -0.4, -0.16926, 0;
    -0.2, -0.243538, 0;
    0, -0.282761, 0;
    0.2, -0.282761, 0;
    0.4, -0.243538, 0;
    0.6, -0.16926, 0;
    0.8, -0.0663604, 0;
    1, 0.0585786, 0
]
prognoz(a, b, N, us) :=
    h ← (b - a)/N
    u[1, 1] ← us[1]
    u[1, 2] ← us[2]
    x[1] ← a
    for i ∈ 2 .. N + 1
        u[i, 1] ← u[i - 1, 1] + h*f(x[i - 1] + h/2, u[i - 1, 1] + h/2*u[i - 1, 1], u[i - 1, 2] + h/2*u[i - 1, 2])[1]
        u[i, 2] ← u[i - 1, 2] + h*f(x[i - 1] + h/2, u[i - 1, 1] + h/2*u[i - 1, 1], u[i - 1, 2] + h/2*u[i - 1, 2])[2]
        x[i] ← x[i - 1] + h
    augment(x, u)
prognoz(a, b, N, u0) = [
    -1, 0.2, 0;
    -0.8, 0.0662071, 0;
    -0.6, -0.0484854, 0;
    -0.4, -0.137928, 0;
    -0.2, -0.195398, 0;
    0, -0.215298, 0;
    0.2, -0.195398, 0;
    0.4, -0.137928, 0;
    0.6, -0.0484854, 0;
    0.8, 0.0662071, 0;
    1, 0.2, 0
]
Runge(a, b, N, us) :=
    h ← (b - a)/N
    u[1, 1] ← us[1]
    u[1, 2] ← us[2]
    x[1] ← a
    for i ∈ 2 .. N + 1
        for j ∈ 1 .. 2
            k1 ← f(x[i - 1], u[i - 1, 1], u[i - 1, 2])[j]
            k2 ← f(x[i - 1] + h/2.0, u[i - 1, 1] + h*k1/2.0, u[i - 1, 2] + h*k1/2.0)[j]
            k3 ← f(x[i - 1] + h/2.0, u[i - 1, 1] + h*k2/2.0, u[i - 1, 2] + h*k2/2.0)[j]
            k4 ← f(x[i - 1] + h, u[i - 1, 1] + h*k3, u[i - 1, 2] + h*k3)[j]
            u[i, j] ← u[i - 1, j] + h*((k1 + (k2*2.0) + (k3*2.0) + k4)/6.0)
        x[i] ← x[i - 1] + h
    augment(x, u)
Runge(a, b, N, u0) = [
    -1, 0.2, 0;
    -0.8, 0.0666401, 0;
    -0.6, -0.0476204, 0;
    -0.4, -0.136681, 0;
    -0.2, -0.193881, 0;
    0, -0.213684, 0;
    0.2, -0.193881, 0;
    0.4, -0.136679, 0;
    0.6, -0.0476116, 0;
    0.8, 0.0666643, 0;
    1, 0.200046, 0
]
